// SBML level 2 version 4

function Rate_law_for_Conversion_2(Activator, RNA, RNA_G, RNA_k0, RNA_k1, RNA_k2)
  RNA_k0*(1 + RNA_k1*Activator)*RNA - RNA_k2*RNA_G;
end

function Rate_law_for_transcription_1(DNA, t)
  t*DNA;
end

function Rate_law_for_Conversion_1(Activator, DNA, DNA_G, DNA_k0, DNA_k1, DNA_k2)
  DNA_k0*(1 + DNA_k1*Activator)*DNA - DNA_k2*DNA_G;
end

function Rate_law_for_transcription_2(DNA_G, t_G)
  t_G*DNA_G;
end

model G4_conversionprocess()
  // G4-conversionprocess

  // Compartments:
  compartment compartment = 1;

  // Species:
  species DNA in compartment = 1;
  species DNA_G in compartment = 0;
  species RNA in compartment = 0;
  species RNA_G in compartment = 0;
  species Activator in compartment = 0;

  // Parameters:
  DNA_k0 = 0.028;
  DNA_k1 = 10;
  DNA_k2 = 0.001;
  RNA_k0 = 0.03;
  RNA_k1 = 10;
  RNA_k2 = 0.001;
  tr_G = 0.005;
  tr = 0.05;
  d = 0.005;
  d_G = 0.05;

  // Reactions:
  DNA_conversion: DNA -> DNA_G; compartment*Rate_law_for_Conversion_1(Activator, DNA, DNA_G, DNA_k0, DNA_k1, DNA_k2);  // modifiers: Activator
  RNA_conversion: RNA -> RNA_G; compartment*Rate_law_for_Conversion_2(Activator, RNA, RNA_G, RNA_k0, RNA_k1, RNA_k2);  // modifiers: Activator
  DNA_transcription: => RNA; compartment*Rate_law_for_transcription_1(DNA, tr);  // modifiers: DNA
  DNA_G_transcription: => RNA; compartment*Rate_law_for_transcription_2(DNA_G, tr_G);  // modifiers: DNA_G
  RNA_degradation: RNA => ; compartment*d*RNA;
  RNA_G_degradation: RNA_G => ; compartment*d_G*RNA_G;

  // Unit definitions:
  unit length = metre;
  unit area = metre^2;
  unit volume = litre;
  unit time = second;
  unit substance = mole;
end
